// COMSOL Multiphysics 5.3.0.260 model "180314改变摩擦系数+磁场.mph"
// 未命名
// Outline of the model tree

Parameters
  theta = 10[deg]
  t = 1
  mt = 0.85[mT]
  content = 0.1

Variables
  var1 "变量 1"
    V = intop1(g_const*solid.rho*(y+0.85))*1[m]  // Potential energy
    mu_max = maxop1(if(solid.cnt1.isContact_p1,solid.cnt1.fric1.mu_fric,0))  // Maximum value of friction coefficient
    W_tot = solid.Wk_tot+solid.Ws_tot+V+solid.Wfric_tot  // Total energy

Selections
  sel1: Explicit "contact_src" on boundaries 4, 8, 10
  sel2: Explicit "contact_dst" on boundaries 15, 16, 19, 22

Couplings
  intop1: Integration "积分 1" on domains 4-7
  maxop1: Maximum "最大值 1" on selection sel2 | points = integration

Probes
  var1: GlobalVariable "全局变量探针 1" | expr = W_tot; unit = J; table = tbl1

Pairs
  p1: Contact "接触对 1" | source: selection sel1; destination: selection sel2

Geometry
  geom1 "几何 1" (2D, length unit m)
    c1: Circle "圆 1" | layername = 层 1; layer = 0.01; r = 1.01
    c2: Circle "圆 2" | pos = {2.1, 0}; layername = 层 1; layer = 0.01; r = 1.01
    c3: Circle "圆 3" | pos = {-0.85, 0}; layername = 层 1; layer = 0.02; r = 0.15
    del1: Delete "删除实体 1" | input = c1(1) domains 1, 3-5; c2(1) domains 1, 2, 4, 5
    r1: Rectangle "矩形 1" | pos = {0, -1.01}; size = {2.1, 1e-2}
    uni1: Union "并集 1" | input = del1, r1
    rot1: Rotate "旋转 1" | input = c3; rot = theta
    fin: Finalize "形成装配" | action = assembly

Materials
  mat1: Common "材料 1" on all domains
    def "基本"
      youngsmodulus = 5e6
      poissonsratio = 0.45
      density = 2000
      relpermeability = 1
      electricconductivity = 1
      relpermittivity = 1

Physics
  solid: SolidMechanics "固体力学" on all domains
    dependent variable u = {u, v, w}
    lemm1: LinearElasticModel "线弹性材料 1" (default)
    free1: Free "自由 1" (default)
    init1: init "初始值 1" (default)
    fix1: Fixed "固定约束 1" on domains 1-3
    gr1: Gravity "重力 1" on domains 4-8
    cnt1: Contact "接触 1" on all boundaries
      penaltyCtrl = ManualTuning
      useRelaxation = Never
      storeEnergy = 1
      pairs = p1
      free1: Free "自由 1" (default)
      fric1: Friction "摩擦 1" on all boundaries | FrictionModel = DynamicFriction; mustat = 1.2; mudyn = 1.03; dcfric = 1
  mf: InductionCurrents "磁场" on all domains
    dependent variable A = {Ax, Ay, Az}
    al1: AmperesLaw "安培定律 1" (default)
    mi1: MagneticInsulation "磁绝缘 1" (default)
    init1: init "初始值 1" (default) | A = {0, 0, 100}
    pmc1: PerfectMagneticConductor "完美磁导体 1" on all boundaries

Mesh
  mesh1 "网格 1"
    size: MeshSizeDefault "尺寸" | hmax = 0.276; hmin = 0.00124; hcurve = 0.3; hgrad = 1.3
    map1: Map "映射 1" on remaining entities
      dis1: Distribution "分布 1" on boundaries 11-14 | numelem = 3
      dis2: Distribution "分布 2" on boundaries 1 | numelem = 1
      dis3: Distribution "分布 3" on boundaries 8, 10 | numelem = 300
      dis4: Distribution "分布 4" on boundaries 4 | numelem = 100
      dis5: Distribution "分布 5" on selection sel2 | numelem = 20

Studies
  std1 "研究 1"
    time: Transient "瞬态" | tlist = range(0,2e-2,0.5)

Solver configurations
  sol1 "解 1" (study std1)
    v1: Variables "因变量 1"
      comp1_solid_Tn_p1: Field "接触压力 (comp1.solid.Tn_p1)" | scalemethod = manual; scaleval = 5e4
      comp1_solid_Tt_p1: Field "摩擦力 （空间坐标系） (comp1.solid.Tt_p1)" | scalemethod = manual; scaleval = 5e4
      comp1_solid_Wcnt_p1: Field "接触能量密度 (comp1.solid.Wcnt_p1)" | scalemethod = manual; scaleval = 5e-5*5e4
      comp1_solid_Wfric_p1: Field "摩擦耗能密度 (comp1.solid.Wfric_p1)" | scalemethod = manual; scaleval = 5e-3*5e4
      comp1_u: Field "位移场 （材料和几何坐标系） (comp1.u)" | scalemethod = manual; scaleval = 5e-3
    t1: Time "瞬态求解器 1"
      tlist = range(0,2e-2,0.5)
      timemethod = genalpha
      tstepsgenalpha = manual
      predictor = constant
      timestepgenalpha = 5e-3
      dDef: Direct "直接"
      ps1: PreviousSolution "上一个解 1" | prevcomp = {comp1_solid_cm_old_p1, comp1_solid_contact_old_p1}
      se1: Segregated "分离 1" | maxsegiter = 15; ntolfact = 0.1
        ss1: SegregatedStep "分离步 1"
          segvar = {comp1_u}
          linsolver = dDef
          subjtech = onevery
          subtermconst = itertol
          subiter = 7
          usesubminsteprecovery = on
          subtermauto = itertol
          subminstep = 0.5
          subntolfact = 1
        ss2: SegregatedStep "分离步 2" | segvar = {comp1_solid_Wcnt_p1, comp1_solid_Wfric_p1}; linsolver = dDef
        ls1: LumpedStep "集总步骤 1" | segvar = {comp1_solid_Tn_p1, comp1_solid_Tt_p1}
        mf1: SegregatedStep "分离步 1a"
        mf2: SegregatedStep "分离步 2a"

Datasets
  dset1: Solution | solution = sol1
  dset2: Solution "探针解 2" | solution = sol1

Derived values
  gev1: EvalGlobal "全局变量探针 1" | data = dset2; table = tbl1; expr = W_tot

Tables
  tbl1: Table "探针表 1"
    时间 (s) | W_tot (J)
    0 | 242.442
    0.005 | 242.568
    0.01 | 242.937
    0.015 | 243.526
    0.02 | 244.304
    0.025 | 244.803

Plots
  pg1: PlotGroup2D "应力 (solid)" | data = dset1
    surf1: Surface "表面 1" | expr = solid.mises
      def: Deform "变形" | expr = {u, v}; descr = 位移场 （材料和几何坐标系）
    pttraj1: PointTrajectories "点轨迹 1" on points 9 | expr = {u-cos(theta), v-sin(theta)}; pointtype = point
  pg2: PlotGroup1D "Total energy"
    tblp1: Table "探针表图 1" | table = tbl1
  pg3: PlotGroup1D "Energy" | data = dset1
    glob1: Global "全局 1" | expr = {solid.Wk_tot, solid.Ws_tot, V, solid.Wfric_tot, W_tot}
  pg4: PlotGroup1D "Friction coefficient" | data = dset1
    glob1: Global "全局 1" | expr = mu_max

Exports
  anim1: Animation "动画 1"
    movietype = avi
    giffilename = E:\研究生\研二\comsol仿真\初级入门\仿真结果\动画（原）.gif
    avifilename = E:\研究生\研二\comsol仿真\初级入门\仿真结果\动画（原3）.avi
    framesel = all
    width = 1920
    frametime = 1e-1
    options = on
    axes = on