// COMSOL Multiphysics 5.3.0.260 model "180409铁块磁场.mph"
// 未命名
// Outline of the model tree

Geometry
  geom1 "几何 1" (2D, length unit m)
    r1: Rectangle "矩形 1" | base = center; size = {1, 1}
    r2: Rectangle "矩形 2" | base = center; size = {1.5, 1.5}
    fin: Finalize "形成装配" | action = assembly

Materials
  mat1: Common "Iron" on domains 2
    def "基本"
      relpermeability = 4000
      electricconductivity = 1.12e7[S/m]
      thermalexpansioncoefficient = 12.2e-6[1/K]
      heatcapacity = 440[J/(kg*K)]
      relpermittivity = 1
      density = 7870[kg/m^3]
      thermalconductivity = 76.2[W/(m*K)]
    Enu "杨氏模量和泊松比"
      youngsmodulus = 200e9[Pa]
      poissonsratio = 0.29
  mat2: Common "Air" on domains 1
    def "基本"
      relpermeability = 1
      relpermittivity = 1
      dynamicviscosity = eta(T[1/K])[Pa*s]
      ratioofspecificheat = 1.4
      electricconductivity = 0[S/m]
      heatcapacity = Cp(T[1/K])[J/(kg*K)]
      density = rho(pA[1/Pa],T[1/K])[kg/m^3]
      thermalconductivity = k(T[1/K])[W/(m*K)]
      soundspeed = cs(T[1/K])[m/s]
      eta: Piecewise "分段" | arg = T; pieces = {200.0, 1600.0, -8.38278E-7+8.35717342E-8*T^1-7.69429583E-11*T^2+4.6437266E-14*T^3-1.06585607E-17*T^4}
      Cp: Piecewise "分段 2" | arg = T; pieces = {200.0, 1600.0, 1047.63657-0.372589265*T^1+9.45304214E-4*T^2-6.02409443E-7*T^3+1.2858961E-10*T^4}
      rho: Analytic "解析" | expr = pA*0.02897/8.314/T; args = {pA, T}; dermethod = manual; argders = {{pA, d(pA*0.02897/8.314/T,pA)}, {T, d(pA*0.02897/8.314/T,T)}}
      k: Piecewise "分段 3" | arg = T; pieces = {200.0, 1600.0, -0.00227583562+1.15480022E-4*T^1-7.90252856E-8*T^2+4.11702505E-11*T^3-7.43864331E-15*T^4}
      cs: Analytic "解析 2" | expr = sqrt(1.4*287*T); args = T; dermethod = manual; argders = {T, d(sqrt(1.4*287*T),T)}
    RefractiveIndex "折射率"
      n = 1
      ki = 0

Physics
  mf: InductionCurrents "磁场" on all domains
    dependent variable A = {Ax, Ay, Az}
    BackgroundField.SolveFor = ReducedField
    BackgroundField.BackgroundFieldType = Bb
    BackgroundField.Bb = {0, 100, 0}
    al1: AmperesLaw "安培定律 1" (default) | mur_mat = userdef; mur = 1; sigma_mat = userdef; sigma = 1
    mi1: MagneticInsulation "磁绝缘 1" (default)
    init1: init "初始值 1" (default) | A = {0, 0, 0}
    mi2: MagneticInsulation "磁绝缘 2" on boundaries 1-4
    pmc1: PerfectMagneticConductor "完美磁导体 1" on boundaries 5-8
  solid: SolidMechanics "固体力学" on no domains
    dependent variable u = {u, v, w}
    lemm1: LinearElasticModel "线弹性材料 1" (default)
    free1: Free "自由 1" (default)
    init1: init "初始值 1" (default)

Mesh
  mesh1 "网格 1"
    size: MeshSizeDefault "尺寸" | hmax = 0.101; hmin = 4.5E-4; hcurve = 0.3; hgrad = 1.3
    ftri1: FreeTri "自由三角形网格 1" on remaining entities

Studies
  std1 "研究 1"
    time: Transient "瞬态" | tlist = range(0,0.1,1)

Solver configurations
  sol1 "解 1" (study std1)
    v1: Variables "因变量 1"
      comp1_u: Field "位移场 （材料和几何坐标系） (comp1.u)" | scalemethod = manual; scaleval = 1e-2*2.12132034356
    t1: Time "瞬态求解器 1" | tlist = range(0,0.1,1)
      dDef: Direct "直接"
      fc1: FullyCoupled "全耦合 1" | linsolver = dDef

Datasets
  dset1: Solution | solution = sol1

Plots
  pg1: PlotGroup2D "磁通密度模 (mf)" | data = dset1
    surf1: Surface "表面 1" | expr = mf.normB
    con1: Contour "等值线 1" | expr = mf.Az
    arws1: ArrowSurface "面上箭头 1" | expr = {mf.Bx, mf.By}