// COMSOL Multiphysics 5.3.0.260 model "180410单独加磁场.mph"
// 未命名
// Outline of the model tree

Coordinate systems
  ie1: InfiniteElement "无限元域 1" on domains 1-4, 6-9

Geometry
  geom1 "几何 1" (2D, length unit m)
    r1: Rectangle "矩形 1"
      pos = {-1.5, -0.4}
      layername = 层 1
      layer = 0.1
      layerleft = on
      layerright = on
      layertop = on
      size = {2.5, 1}
    fin: Finalize "形成联合体"

Materials
  mat1: Common "材料 1" on all domains
    def "基本"
      relpermeability = 1
      electricconductivity = 1
      relpermittivity = 1

Physics
  mf: InductionCurrents "磁场" on all domains
    dependent variable A = {Ax, Ay, Az}
    BackgroundField.SolveFor = ReducedField
    BackgroundField.BackgroundFieldType = Bb
    BackgroundField.Bb = {0, 1, 0}
    al1: AmperesLaw "安培定律 1" (default)
    mi1: MagneticInsulation "磁绝缘 1" (default)
    init1: init "初始值 1" (default) | A = {0, 100, 0}
    al2: AmperesLaw "安培定律 2" on no domains
      mur_mat = userdef
      mur = 2.1
      sigma_mat = userdef
      sigma = 1
      epsilonr_mat = userdef
      epsilonr = 1

Mesh
  mesh1 "网格 1" (physics-controlled)
    size: MeshSizeDefault "尺寸" | hauto = 3

Studies
  std1 "研究 1"
    stat: Stationary "稳态"

Solver configurations
  sol1 "解 1" (study std1)
    v1: Variables "因变量 1"
    s1: Stationary "稳态求解器 1"
      dDef: Direct "直接"
      fc1: FullyCoupled "全耦合 1" | linsolver = dDef

Datasets
  dset1: Solution | solution = sol1

Plots
  pg1: PlotGroup2D "磁通密度模 (mf)" | data = dset1
    surf1: Surface "表面 1" | expr = mf.normB
    con1: Contour "等值线 1" | expr = mf.Az