// COMSOL Multiphysics 5.3.0.260 model "180411加上了磁场.mph"
// 未命名
// Outline of the model tree

Parameters
  theta = 10[deg]

Variables
  var1 "变量 1"
    MREyong = log(mf.normB^2+1)+1
    V = intop1(g_const*solid.rho*(y+9))*1[cm]
    mu_max = maxop1(if(solid.cnt1.isContact_p1,solid.cnt1.fric1.mu_fric,0))
    W_tot = solid.Wk_tot+solid.Ws_tot+V+solid.Wfric_tot

Selections
  sel1: Explicit "contact_src" on boundaries 28, 32, 34
  sel2: Explicit "contact_dst" on boundaries 35-38

Couplings
  intop1: Integration "积分 1" on domains 13
  maxop1: Maximum "最大值 1" on selection sel2 | points = integration

Probes
  var1: GlobalVariable "全局变量探针 1" | expr = W_tot; unit = J; table = tbl1

Pairs
  p1: Contact "接触对 1" | source: selection sel1; destination: selection sel2

Coordinate systems
  ie1: InfiniteElement "无限元域 1" on domains 1-4, 6-9

Geometry
  geom1 "几何 1" (2D, length unit cm)
    c1: Circle "圆 1" | layername = 层 1; layer = 0.5; r = 10.5
    c2: Circle "圆 2" | pos = {21, 0}; layername = 层 1; layer = 0.5; r = 10.5
    c3: Circle "圆 3" | pos = {-9, 0}
    del1: Delete "删除实体 1" | input = c1(1) domains 1, 3-5; c2(1) domains 1, 2, 4, 5
    r1: Rectangle "矩形 1" | pos = {0, -10.5}; size = {21, 0.5}
    uni1: Union "并集 1" | input = del1, r1
    rot1: Rotate "旋转 1" | input = c3; rot = theta
    r2: Rectangle "矩形 2"
      pos = {-13, -14}
      layername = 层 1
      layer = 1
      layerleft = on
      layerright = on
      layertop = on
      size = {47, 16}
    fin: Finalize "形成装配" | action = assembly

Materials
  mat1: Common "Air" on domains 1-9
    def "基本"
      relpermeability = 1
      relpermittivity = 1
      dynamicviscosity = eta(T[1/K])[Pa*s]
      ratioofspecificheat = 1.4
      electricconductivity = 0[S/m]
      heatcapacity = Cp(T[1/K])[J/(kg*K)]
      density = rho(pA[1/Pa],T[1/K])[kg/m^3]
      thermalconductivity = k(T[1/K])[W/(m*K)]
      soundspeed = cs(T[1/K])[m/s]
      youngsmodulus = 1
      poissonsratio = 0.01
      eta: Piecewise "分段" | arg = T; pieces = {200.0, 1600.0, -8.38278E-7+8.35717342E-8*T^1-7.69429583E-11*T^2+4.6437266E-14*T^3-1.06585607E-17*T^4}
      Cp: Piecewise "分段 2" | arg = T; pieces = {200.0, 1600.0, 1047.63657-0.372589265*T^1+9.45304214E-4*T^2-6.02409443E-7*T^3+1.2858961E-10*T^4}
      rho: Analytic "解析" | expr = pA*0.02897/8.314/T; args = {pA, T}; dermethod = manual; argders = {{pA, d(pA*0.02897/8.314/T,pA)}, {T, d(pA*0.02897/8.314/T,T)}}
      k: Piecewise "分段 3" | arg = T; pieces = {200.0, 1600.0, -0.00227583562+1.15480022E-4*T^1-7.90252856E-8*T^2+4.11702505E-11*T^3-7.43864331E-15*T^4}
      cs: Analytic "解析 2" | expr = sqrt(1.4*287*T); args = T; dermethod = manual; argders = {T, d(sqrt(1.4*287*T),T)}
    RefractiveIndex "折射率"
      n = 1
      ki = 0
  mat2: Common "MRE" on domains 10-13
    def "基本"
      youngsmodulus = 2.8e6*MREyong
      poissonsratio = 0.45
      density = 2000
      relpermeability = 2
      electricconductivity = 200
      relpermittivity = 2.5
    BHCurve "BH 曲线"
      normB = BHCurve2(normH[1/(A/m)])[T]
      normH = sqrt(H1^2+H2^2+H3^2)
      int1: Interpolation "插值 1"
        funcname = BHCurve2
        table = 
          {0, 0}
          {1169, 0.0057}
          {12879, 0.0979}
          {26927, 0.1977}
          {42532, 0.2976}
          {49942, 0.3379}
          {61253, 0.3993}
          {81918, 0.4971}
          {99850, 0.5681}
          {109982, 0.5987}
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    HBCurve "HB 曲线"
      normH = HBCurve2(normB[1/(T)])[A/m]
      normB = sqrt(B1^2+B2^2+B3^2)
      int1: Interpolation "插值 1"
        funcname = HBCurve2
        table = 
          {0, 0}
          {0.0057, 1169}
          {0.0979, 12879}
          {0.1977, 26927}
          {0.2976, 42532}
          {0.3379, 49942}
          {0.3993, 61253}
          {0.4971, 81918}
          {0.5681, 99850}
          {0.5987, 109982}
          {0.6658, 129860}
          {0.7022, 140772}
          {0.7214, 150122}
          {0.7731, 171941}
          {0.8056, 188303}
          {0.8304, 199602}
          {0.8839, 236604}
          {0.9068, 250238}
          {0.9688, 300000}
          {0.9888, 316000}

Physics
  solid: SolidMechanics "固体力学" on all domains
    dependent variable u = {u, v, w}
    lemm1: LinearElasticModel "线弹性材料 1" (default)
    free1: Free "自由 1" (default)
    init1: init "初始值 1" (default)
    fix1: Fixed "固定约束 1" on domains 10-12
    gr1: Gravity "重力 1" on domains 13
    cnt1: Contact "接触 1" on all boundaries
      penaltyCtrl = ManualTuning
      useRelaxation = Never
      storeEnergy = 1
      pairs = p1
      free1: Free "自由 1" (default)
      fric1: Friction "摩擦 1" on all boundaries | FrictionModel = DynamicFriction; mustat = 0.5; mudyn = 0.3; dcfric = 1
  mf: InductionCurrents "磁场" on all domains
    dependent variable A = {Ax, Ay, Az}
    BackgroundField.SolveFor = ReducedField
    BackgroundField.BackgroundFieldType = Bb
    BackgroundField.Bb = {0, 1, 0}
    al1: AmperesLaw "安培定律 1" (default)
    mi1: MagneticInsulation "磁绝缘 1" (default)
    init1: init "初始值 1" (default)

Mesh
  mesh1 "网格 1"
    size: MeshSizeDefault "尺寸" | hmax = 3.15; hmin = 0.0141; hcurve = 0.3; hgrad = 1.3
    map1: Map "映射 1" on remaining entities
      dis1: Distribution "分布 1" on boundaries 25 | numelem = 1
      dis2: Distribution "分布 2" on boundaries 32, 34 | numelem = 300
      dis3: Distribution "分布 3" on boundaries 28 | numelem = 100
      dis4: Distribution "分布 4" on selection sel2 | numelem = 20
  mesh2 "网格 2" (physics-controlled)
    size: MeshSizeDefault "尺寸" | hauto = 3

Studies
  std1 "研究 1"
    stat: Stationary "稳态" | physselection = solid; solve for = {mf}; mesh = {geom1, mesh2}
  std2 "研究 2"
    time: Transient "瞬态" | tlist = range(0,2e-2,4); physselection = solid; solve for = {solid}; mesh = {geom1, mesh1}

Solver configurations
  sol1 "解 1" (study std1)
    v1: Variables "因变量 1"
    s1: Stationary "稳态求解器 1"
      dDef: Direct "直接"
      fc1: FullyCoupled "全耦合 1" | linsolver = dDef
  sol2 "解 2" (study std2)
    v1: Variables "因变量 1"
      comp1_solid_Tn_p1: Field "接触压力 (comp1.solid.Tn_p1)" | scalemethod = manual; scaleval = 5e4
      comp1_solid_Tt_p1: Field "摩擦力 （空间坐标系） (comp1.solid.Tt_p1)" | scalemethod = manual; scaleval = 5e4
      comp1_solid_Wcnt_p1: Field "接触能量密度 (comp1.solid.Wcnt_p1)" | scalemethod = manual; scaleval = 5e-5*5e4
      comp1_solid_Wfric_p1: Field "摩擦耗能密度 (comp1.solid.Wfric_p1)" | scalemethod = manual; scaleval = 5e-3*5e4
      comp1_u: Field "位移场 （材料和几何坐标系） (comp1.u)" | scalemethod = manual; scaleval = 5e-3
    t1: Time "瞬态求解器 1"
      tlist = range(0,2e-2,4)
      timemethod = genalpha
      tstepsgenalpha = manual
      predictor = constant
      timestepgenalpha = 5e-3
      dDef: Direct "直接"
      ps1: PreviousSolution "上一个解 1" | prevcomp = {comp1_solid_cm_old_p1, comp1_solid_contact_old_p1}
      se1: Segregated "分离 1" | maxsegiter = 15; ntolfact = 0.1
        ss1: SegregatedStep "分离步 1"
          segvar = {comp1_u}
          linsolver = dDef
          subjtech = onevery
          subtermconst = itertol
          subiter = 7
          usesubminsteprecovery = on
          subtermauto = itertol
          subminstep = 0.5
          subntolfact = 1
        ss2: SegregatedStep "分离步 2" | segvar = {comp1_solid_Wcnt_p1, comp1_solid_Wfric_p1}; linsolver = dDef
        ls1: LumpedStep "集总步骤 1" | segvar = {comp1_solid_Tn_p1, comp1_solid_Tt_p1}

Datasets
  dset1: Solution | solution = sol1
  dset2: Solution | solution = sol2
  dset3: Solution "探针解 3" | solution = sol2

Tables
  tbl1: Table "探针表 1"
    时间 (s) | W_tot (J)
    0 | 0.553543
    0.005 | 0.554232
    0.01 | 0.556215
    0.015 | 0.559507
    0.02 | 0.564129
    0.025 | 0.570057
    0.03 | 0.577169
    0.035 | 0.585647
    0.04 | 0.595761
    0.045 | 0.606662
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
Plots
  pg1: PlotGroup2D "磁通密度模 (mf)" | data = dset1
    surf1: Surface "表面 1" | expr = mf.normB
    con1: Contour "等值线 1" | expr = mf.Az
  pg3: PlotGroup1D "探针图组 3"
    tblp1: Table "探针表图 1" | table = tbl1